// SBML level 3 version 1

function CKS_uu(Vf_max, S1, Km_s1, Vb_max, P1, Km_p1)
  (Vf_max*(S1/Km_s1) - Vb_max*(P1/Km_p1))/(1 + S1/Km_s1 + 1 + P1/Km_p1 - 1);
end

function CKS_bu(Vf_max, S1, Km_s1, S2, Km_s2, Vb_max, P1, Km_p1)
  (Vf_max*(S1/Km_s1)*(S2/Km_s2) - Vb_max*(P1/Km_p1))/((1 + S1/Km_s1)*(1 + S2/Km_s2) + 1 + P1/Km_p1 - 1);
end

function CKS_ub(Vf_max, S1, Km_s1, Vb_max, P1, Km_p1, P2, Km_p2)
  (Vf_max*(S1/Km_s1) - Vb_max*(P1/Km_p1)*(P2/Km_p2))/(1 + S1/Km_s1 + (1 + P1/Km_p1)*(1 + P2/Km_p2) - 1);
end

function CKS_bb(Vf_max, S1, Km_s1, S2, Km_s2, Vb_max, P1, Km_p1, P2, Km_p2)
  (Vf_max*(S1/Km_s1)*(S2/Km_s2) - Vb_max*(P1/Km_p1)*(P2/Km_p2))/((1 + S1/Km_s1)*(1 + S2/Km_s2) + (1 + P1/Km_p1)*(1 + P2/Km_p2) - 1);
end

function CKS_pc(Vf_max, S1, Km_s1, Vb_max, P1, Km_p1, P2, Km_p2, P3, Km_p3)
  (Vf_max*(S1/Km_s1) - Vb_max*(P1/Km_p1)*(P2/Km_p2)*(P3/Km_p3)^2)/(1 + S1/Km_s1 + (1 + P1/Km_p1)*(1 + P2/Km_p2)*(1 + P3/Km_p3 + (P3/Km_p3)^2) - 1);
end

function Lumped_1(Vf_max, S1, Km_s1, S2, Km_s2, Vb_max, P1, Km_p1)
  (Vf_max*(S1/Km_s1)*(S2/Km_s2)^7 - Vb_max*(P1/Km_p1))/((1 + S1/Km_s1)*(1 + S2/Km_s2)^7 + 1 + P1/Km_p1 - 1);
end

function Lumped_2(Vf_max, S1, Km_s1, Vb_max, P1, Km_p1)
  (Vf_max*(S1/Km_s1)^18 - Vb_max*(P1/Km_p1))/(1 + (S1/Km_s1)^18 + 1 + P1/Km_p1 - 1);
end

function Lumped_3(Vf_max, S1, Km_s1, S2, Km_s2, Vb_max, P1, Km_p1)
  (Vf_max*(S1/Km_s1)*(S2/Km_s2)^5 - Vb_max*(P1/Km_p1))/((1 + S1/Km_s1)*(1 + S2/Km_s2)^5 + 1 + P1/Km_p1 - 1);
end

function Lumped_4(Vf_max, S1, Km_s1, Vb_max, P1, Km_p1)
  (Vf_max*(S1/Km_s1) - Vb_max*(P1/Km_p1)^8)/(1 + S1/Km_s1 + 1 + (P1/Km_p1)^8 - 1);
end

model Mishra_MetabEng2023()
  // isDescribedBy doi:10.1016/j.ymben.2022.11.003
  // model units - substance: mole, time: second, extent: mole

  // Compartments:
  compartment WC = 1 litre;

  // Species:
  species ACoA in WC = init_ACoA; ACoA is "Acetyl-CoA";
  species MCoA in WC = init_MCoA; MCoA is "Malonyl-CoA";
  species FCoA in WC = init_FCoA; FCoA is "Fatty acyl-CoA";
  species Glyc3P in WC = init_Glyc3P; Glyc3P is "Glycerol-3-phosphate";
  species LPA in WC = init_LPA; LPA is "Lysophosphatidic acid";
  species PA in WC = init_PA; PA is "Phosphatidic acid";
  species CDPDAG in WC = init_CDPDAG; CDPDAG is "CDP-Diacylglycerol";
  species Glu6P in WC = init_Glu6P; Glu6P is "Glucose-6-phosphate";
  species mIno in WC = init_mIno; mIno is "myo-Inositol";
  species PmI in WC = init_PmI; PmI is "Phosphatidyl-myo-inositol";
  species PmI4P in WC = init_PmI4P; PmI4P is "Phosphatidyl-myo-inositol 4-phosphate";
  species LPI in WC = init_LPI; LPI is "Lysophosphatidylinositol";
  species PG in WC = init_PG; PG is "Phosphatidylglycerol";
  species CL in WC = init_CL; CL is "Cardiolipin";
  species PS in WC = init_PS; PS is "Phosphatidylserine";
  species LPS in WC = init_LPS; LPS is "Lysophosphatidylserine";
  species PE in WC = init_PE; PE is "Phosphatidylethanolamine";
  species LPE in WC = init_LPE; LPE is "Lysophosphatidylethanolamine";
  species PME in WC = init_PME; PME is "Phosphatidylmethylethanolamine";
  species CDPEthn in WC = init_CDPEthn; CDPEthn is "CDP-Ethanolamine";
  species PC in WC = init_PC; PC is "Phosphatidylcholine";
  species LPC in WC = init_LPC; LPC is "Lysophosphatidylcholine";
  species CDPChol in WC = init_CDPChol; CDPChol is "CDP-Choline";
  species DAG in WC = init_DAG; DAG is "Diacylglycerol";
  species TAG in WC = init_TAG; TAG is "Triacylglycerol";
  species Ergst in WC = init_Ergst; Ergst is "Ergosterol";
  species EE in WC = init_EE; EE is "Ergosterol ester";
  species DHS_PHS in WC = init_DHS_PHS; DHS_PHS is "Dihydrosphingosine-Phytosphingosine";
  species C26CoA in WC = init_C26CoA; C26CoA is "C26 Fatty acyl-CoA";
  species Cer in WC = init_Cer; Cer is "Ceramide";
  species IPC in WC = init_IPC; IPC is "Inositolphosphoceramide";
  species MIPC in WC = init_MIPC; MIPC is "Mannosyl-inositolphosphoceramide";
  species MIP2C in WC = init_MIP2C; MIP2C is "Mannosyl-diinositolphosphoceramide";
  species FA in WC = init_FA; FA is "Fatty acid";
  species FOH in WC = init_FOH; FOH is "Fatty alcohol";

  // Parameters:
  init_ACoA = 1 mmol_per_gDCW;
  init_MCoA = 1 mmol_per_gDCW;
  init_FCoA = 1 mmol_per_gDCW;
  init_Glyc3P = 1 mmol_per_gDCW;
  init_LPA = 1 mmol_per_gDCW;
  init_PA = 1 mmol_per_gDCW;
  init_CDPDAG = 1 mmol_per_gDCW;
  init_Glu6P = 1 mmol_per_gDCW;
  init_mIno = 1 mmol_per_gDCW;
  init_PmI = 1 mmol_per_gDCW;
  init_PmI4P = 1 mmol_per_gDCW;
  init_LPI = 1 mmol_per_gDCW;
  init_PG = 1 mmol_per_gDCW;
  init_CL = 1 mmol_per_gDCW;
  init_PS = 1 mmol_per_gDCW;
  init_LPS = 1 mmol_per_gDCW;
  init_PE = 1 mmol_per_gDCW;
  init_LPE = 1 mmol_per_gDCW;
  init_PME = 1 mmol_per_gDCW;
  init_CDPEthn = 1 mmol_per_gDCW;
  init_PC = 1 mmol_per_gDCW;
  init_LPC = 1 mmol_per_gDCW;
  init_CDPChol = 1 mmol_per_gDCW;
  init_DAG = 1 mmol_per_gDCW;
  init_TAG = 1 mmol_per_gDCW;
  init_Ergst = 1 mmol_per_gDCW;
  init_EE = 1 mmol_per_gDCW;
  init_DHS_PHS = 1 mmol_per_gDCW;
  init_C26CoA = 1 mmol_per_gDCW;
  init_Cer = 1 mmol_per_gDCW;
  init_IPC = 1 mmol_per_gDCW;
  init_MIPC = 1 mmol_per_gDCW;
  init_MIP2C = 1 mmol_per_gDCW;
  init_FA = 1 mmol_per_gDCW;
  init_FOH = 1 mmol_per_gDCW;
  Vf_ACC1 = 1 mmol_per_gDCW_per_hour;
  Vb_ACC1 = 1 mmol_per_gDCW_per_hour;
  Ks_ACC1_ACoA = 1 mmol_per_gDCW;
  Kp_ACC1_MCoA = 1 mmol_per_gDCW;
  Ki_ACC1_FCoA = 1 mmol_per_gDCW;
  Ki_ACC1_C26CoA = 1 mmol_per_gDCW;
  Ka_ACC1_PA = 1 mmol_per_gDCW;
  Vf_FAS1_FAS2 = 1 mmol_per_gDCW_per_hour;
  Vb_FAS1_FAS2 = 1 mmol_per_gDCW_per_hour;
  Ks_FAS1_FAS2_ACoA = 1 mmol_per_gDCW;
  Ks_FAS1_FAS2_MCoA = 1 mmol_per_gDCW;
  Kp_FAS1_FAS2_FCoA = 1 mmol_per_gDCW;
  Ka_FAS1_FAS2_PA = 1 mmol_per_gDCW;
  Vf_SCT1 = 1 mmol_per_gDCW_per_hour;
  Vb_SCT1 = 1 mmol_per_gDCW_per_hour;
  Ks_SCT1_Glyc3P = 1 mmol_per_gDCW;
  Ks_SCT1_FCoA = 1 mmol_per_gDCW;
  Kp_SCT1_LPA = 1 mmol_per_gDCW;
  Ka_SCT1_PS = 1 mmol_per_gDCW;
  Vf_GPT2 = 1 mmol_per_gDCW_per_hour;
  Vb_GPT2 = 1 mmol_per_gDCW_per_hour;
  Ks_GPT2_Glyc3P = 1 mmol_per_gDCW;
  Ks_GPT2_FCoA = 1 mmol_per_gDCW;
  Kp_GPT2_LPA = 1 mmol_per_gDCW;
  Ka_GPT2_PS = 1 mmol_per_gDCW;
  Vf_SLC1 = 1 mmol_per_gDCW_per_hour;
  Vb_SLC1 = 1 mmol_per_gDCW_per_hour;
  Ks_SLC1_LPA = 1 mmol_per_gDCW;
  Ks_SLC1_FCoA = 1 mmol_per_gDCW;
  Kp_SLC1_PA = 1 mmol_per_gDCW;
  Vf_ALE1_a = 1 mmol_per_gDCW_per_hour;
  Vb_ALE1_a = 1 mmol_per_gDCW_per_hour;
  Ks_ALE1_a_LPA = 1 mmol_per_gDCW;
  Ks_ALE1_a_FCoA = 1 mmol_per_gDCW;
  Kp_ALE1_a_PA = 1 mmol_per_gDCW;
  Vf_ALE1_b = 1 mmol_per_gDCW_per_hour;
  Vb_ALE1_b = 1 mmol_per_gDCW_per_hour;
  Ks_ALE1_b_LPE = 1 mmol_per_gDCW;
  Ks_ALE1_b_FCoA = 1 mmol_per_gDCW;
  Kp_ALE1_b_PE = 1 mmol_per_gDCW;
  Vf_ALE1_c = 1 mmol_per_gDCW_per_hour;
  Vb_ALE1_c = 1 mmol_per_gDCW_per_hour;
  Ks_ALE1_c_LPS = 1 mmol_per_gDCW;
  Ks_ALE1_c_FCoA = 1 mmol_per_gDCW;
  Kp_ALE1_c_PS = 1 mmol_per_gDCW;
  Vf_ALE1_d = 1 mmol_per_gDCW_per_hour;
  Vb_ALE1_d = 1 mmol_per_gDCW_per_hour;
  Ks_ALE1_d_LPI = 1 mmol_per_gDCW;
  Ks_ALE1_d_FCoA = 1 mmol_per_gDCW;
  Kp_ALE1_d_PmI = 1 mmol_per_gDCW;
  Vf_ALE1_e = 1 mmol_per_gDCW_per_hour;
  Vb_ALE1_e = 1 mmol_per_gDCW_per_hour;
  Ks_ALE1_e_LPC = 1 mmol_per_gDCW;
  Ks_ALE1_e_FCoA = 1 mmol_per_gDCW;
  Kp_ALE1_e_PC = 1 mmol_per_gDCW;
  Vf_CDS1 = 1 mmol_per_gDCW_per_hour;
  Vb_CDS1 = 1 mmol_per_gDCW_per_hour;
  Ks_CDS1_PA = 1 mmol_per_gDCW;
  Kp_CDS1_CDPDAG = 1 mmol_per_gDCW;
  Ka_CDS1_PA = 1 mmol_per_gDCW;
  Vf_INO1 = 1 mmol_per_gDCW_per_hour;
  Vb_INO1 = 1 mmol_per_gDCW_per_hour;
  Ks_INO1_Glu6P = 1 mmol_per_gDCW;
  Kp_INO1_mIno = 1 mmol_per_gDCW;
  Ka_INO1_PA = 1 mmol_per_gDCW;
  Vf_INM1_PIS1 = 1 mmol_per_gDCW_per_hour;
  Vb_INM1_PIS1 = 1 mmol_per_gDCW_per_hour;
  Ks_INM1_PIS1_CDPDAG = 1 mmol_per_gDCW;
  Ks_INM1_PIS1_mIno = 1 mmol_per_gDCW;
  Kp_INM1_PIS1_PmI = 1 mmol_per_gDCW;
  Ka_INM1_PIS1_PA = 1 mmol_per_gDCW;
  Vf_PIK1 = 1 mmol_per_gDCW_per_hour;
  Vb_PIK1 = 1 mmol_per_gDCW_per_hour;
  Ks_PIK1_PmI = 1 mmol_per_gDCW;
  Kp_PIK1_PmI4P = 1 mmol_per_gDCW;
  Vf_PGS1_GEP4 = 1 mmol_per_gDCW_per_hour;
  Vb_PGS1_GEP4 = 1 mmol_per_gDCW_per_hour;
  Ks_PGS1_GEP4_CDPDAG = 1 mmol_per_gDCW;
  Ks_PGS1_GEP4_Glyc3P = 1 mmol_per_gDCW;
  Kp_PGS1_GEP4_PG = 1 mmol_per_gDCW;
  Vf_CRD1 = 1 mmol_per_gDCW_per_hour;
  Vb_CRD1 = 1 mmol_per_gDCW_per_hour;
  Ks_CRD1_CDPDAG = 1 mmol_per_gDCW;
  Ks_CRD1_PG = 1 mmol_per_gDCW;
  Kp_CRD1_CL = 1 mmol_per_gDCW;
  Vf_CHO1 = 1 mmol_per_gDCW_per_hour;
  Vb_CHO1 = 1 mmol_per_gDCW_per_hour;
  Ks_CHO1_CDPDAG = 1 mmol_per_gDCW;
  Kp_CHO1_PS = 1 mmol_per_gDCW;
  Ki_CHO1_DHS_PHS = 1 mmol_per_gDCW;
  Ki_CHO1_DAG = 1 mmol_per_gDCW;
  Ki_CHO1_mIno = 1 mmol_per_gDCW;
  Ka_CHO1_PA = 1 mmol_per_gDCW;
  Ka_CHO1_PmI = 1 mmol_per_gDCW;
  Vf_PSD1 = 1 mmol_per_gDCW_per_hour;
  Vb_PSD1 = 1 mmol_per_gDCW_per_hour;
  Ks_PSD1_PS = 1 mmol_per_gDCW;
  Kp_PSD1_PE = 1 mmol_per_gDCW;
  Ka_PSD1_PA = 1 mmol_per_gDCW;
  Vf_CHO2 = 1 mmol_per_gDCW_per_hour;
  Vb_CHO2 = 1 mmol_per_gDCW_per_hour;
  Ks_CHO2_PE = 1 mmol_per_gDCW;
  Kp_CHO2_PME = 1 mmol_per_gDCW;
  Ka_CHO2_PA = 1 mmol_per_gDCW;
  Vf_OPI3 = 1 mmol_per_gDCW_per_hour;
  Vb_OPI3 = 1 mmol_per_gDCW_per_hour;
  Ks_OPI3_PME = 1 mmol_per_gDCW;
  Kp_OPI3_PC = 1 mmol_per_gDCW;
  Ka_OPI3_PA = 1 mmol_per_gDCW;
  Vf_NTE1_GDE1 = 1 mmol_per_gDCW_per_hour;
  Vb_NTE1_GDE1 = 1 mmol_per_gDCW_per_hour;
  Ks_NTE1_GDE1_PC = 1 mmol_per_gDCW;
  Kp_NTE1_GDE1_CDPChol = 1 mmol_per_gDCW;
  Kp_NTE1_GDE1_Glyc3P = 1 mmol_per_gDCW;
  Kp_NTE1_GDE1_FA = 1 mmol_per_gDCW;
  Vf_CPT1 = 1 mmol_per_gDCW_per_hour;
  Vb_CPT1 = 1 mmol_per_gDCW_per_hour;
  Ks_CPT1_DAG = 1 mmol_per_gDCW;
  Ks_CPT1_CDPChol = 1 mmol_per_gDCW;
  Kp_CPT1_PC = 1 mmol_per_gDCW;
  Vf_SPO14 = 1 mmol_per_gDCW_per_hour;
  Vb_SPO14 = 1 mmol_per_gDCW_per_hour;
  Ks_SPO14_PC = 1 mmol_per_gDCW;
  Kp_SPO14_PA = 1 mmol_per_gDCW;
  Kp_SPO14_CDPChol = 1 mmol_per_gDCW;
  Vf_EPT1 = 1 mmol_per_gDCW_per_hour;
  Vb_EPT1 = 1 mmol_per_gDCW_per_hour;
  Ks_EPT1_DAG = 1 mmol_per_gDCW;
  Ks_EPT1_CDPEthn = 1 mmol_per_gDCW;
  Kp_EPT1_PE = 1 mmol_per_gDCW;
  Vf_PLB3_a = 1 mmol_per_gDCW_per_hour;
  Vb_PLB3_a = 1 mmol_per_gDCW_per_hour;
  Ks_PLB3_a_PE = 1 mmol_per_gDCW;
  Kp_PLB3_a_LPE = 1 mmol_per_gDCW;
  Kp_PLB3_a_FA = 1 mmol_per_gDCW;
  Vf_PLB3_b = 1 mmol_per_gDCW_per_hour;
  Vb_PLB3_b = 1 mmol_per_gDCW_per_hour;
  Ks_PLB3_b_PS = 1 mmol_per_gDCW;
  Kp_PLB3_b_LPS = 1 mmol_per_gDCW;
  Kp_PLB3_b_FA = 1 mmol_per_gDCW;
  Vf_PLB3_c = 1 mmol_per_gDCW_per_hour;
  Vb_PLB3_c = 1 mmol_per_gDCW_per_hour;
  Ks_PLB3_c_PmI = 1 mmol_per_gDCW;
  Kp_PLB3_c_LPI = 1 mmol_per_gDCW;
  Kp_PLB3_c_FA = 1 mmol_per_gDCW;
  Vf_PLB3_d = 1 mmol_per_gDCW_per_hour;
  Vb_PLB3_d = 1 mmol_per_gDCW_per_hour;
  Ks_PLB3_d_PC = 1 mmol_per_gDCW;
  Kp_PLB3_d_LPC = 1 mmol_per_gDCW;
  Kp_PLB3_d_FA = 1 mmol_per_gDCW;
  Vf_PAH1 = 1 mmol_per_gDCW_per_hour;
  Vb_PAH1 = 1 mmol_per_gDCW_per_hour;
  Ks_PAH1_PA = 1 mmol_per_gDCW;
  Kp_PAH1_DAG = 1 mmol_per_gDCW;
  Ki_PAH1_DHS_PHS = 1 mmol_per_gDCW;
  Ka_PAH1_CDPDAG = 1 mmol_per_gDCW;
  Ka_PAH1_PmI = 1 mmol_per_gDCW;
  Vf_DGA1 = 1 mmol_per_gDCW_per_hour;
  Vb_DGA1 = 1 mmol_per_gDCW_per_hour;
  Ks_DGA1_DAG = 1 mmol_per_gDCW;
  Ks_DGA1_FCoA = 1 mmol_per_gDCW;
  Kp_DGA1_TAG = 1 mmol_per_gDCW;
  Vf_LRO1_a = 1 mmol_per_gDCW_per_hour;
  Vb_LRO1_a = 1 mmol_per_gDCW_per_hour;
  Ks_LRO1_a_DAG = 1 mmol_per_gDCW;
  Ks_LRO1_a_PC = 1 mmol_per_gDCW;
  Kp_LRO1_a_TAG = 1 mmol_per_gDCW;
  Kp_LRO1_a_LPC = 1 mmol_per_gDCW;
  Vf_LRO1_b = 1 mmol_per_gDCW_per_hour;
  Vb_LRO1_b = 1 mmol_per_gDCW_per_hour;
  Ks_LRO1_b_DAG = 1 mmol_per_gDCW;
  Ks_LRO1_b_PE = 1 mmol_per_gDCW;
  Kp_LRO1_b_TAG = 1 mmol_per_gDCW;
  Kp_LRO1_b_LPE = 1 mmol_per_gDCW;
  Vf_TGL3_a = 1 mmol_per_gDCW_per_hour;
  Vb_TGL3_a = 1 mmol_per_gDCW_per_hour;
  Ks_TGL3_a_TAG = 1 mmol_per_gDCW;
  Kp_TGL3_a_DAG = 1 mmol_per_gDCW;
  Kp_TGL3_a_FA = 1 mmol_per_gDCW;
  Vf_TGL3_b = 1 mmol_per_gDCW_per_hour;
  Vb_TGL3_b = 1 mmol_per_gDCW_per_hour;
  Ks_TGL3_b_DAG = 1 mmol_per_gDCW;
  Kp_TGL3_b_Glyc3P = 1 mmol_per_gDCW;
  Kp_TGL3_b_FA = 1 mmol_per_gDCW;
  Vf_ERG_all = 1 mmol_per_gDCW_per_hour;
  Vb_ERG_all = 1 mmol_per_gDCW_per_hour;
  Ks_ERG_all_ACoA = 1 mmol_per_gDCW;
  Kp_ERG_all_Ergst = 1 mmol_per_gDCW;
  Ki_ERG_all_Ergst = 1 mmol_per_gDCW;
  Vf_ARE2 = 1 mmol_per_gDCW_per_hour;
  Vb_ARE2 = 1 mmol_per_gDCW_per_hour;
  Ks_ARE2_Ergst = 1 mmol_per_gDCW;
  Ks_ARE2_FCoA = 1 mmol_per_gDCW;
  Kp_ARE2_EE = 1 mmol_per_gDCW;
  Vf_TGL1 = 1 mmol_per_gDCW_per_hour;
  Vb_TGL1 = 1 mmol_per_gDCW_per_hour;
  Ks_TGL1_EE = 1 mmol_per_gDCW;
  Kp_TGL1_Ergst = 1 mmol_per_gDCW;
  Kp_TGL1_FA = 1 mmol_per_gDCW;
  Vf_ELO123 = 1 mmol_per_gDCW_per_hour;
  Vb_ELO123 = 1 mmol_per_gDCW_per_hour;
  Ks_ELO123_FCoA = 1 mmol_per_gDCW;
  Ks_ELO123_MCoA = 1 mmol_per_gDCW;
  Kp_ELO123_C26CoA = 1 mmol_per_gDCW;
  Vf_LCB1 = 1 mmol_per_gDCW_per_hour;
  Vb_LCB1 = 1 mmol_per_gDCW_per_hour;
  Ks_LCB1_FCoA = 1 mmol_per_gDCW;
  Kp_LCB1_DHS_PHS = 1 mmol_per_gDCW;
  Vf_DPL1 = 1 mmol_per_gDCW_per_hour;
  Vb_DPL1 = 1 mmol_per_gDCW_per_hour;
  Ks_DPL1_DHS_PHS = 1 mmol_per_gDCW;
  Kp_DPL1_CDPEthn = 1 mmol_per_gDCW;
  Kp_DPL1_FA = 1 mmol_per_gDCW;
  Vf_LAC1 = 1 mmol_per_gDCW_per_hour;
  Vb_LAC1 = 1 mmol_per_gDCW_per_hour;
  Ks_LAC1_DHS_PHS = 1 mmol_per_gDCW;
  Ks_LAC1_C26CoA = 1 mmol_per_gDCW;
  Kp_LAC1_Cer = 1 mmol_per_gDCW;
  Vf_YPC1 = 1 mmol_per_gDCW_per_hour;
  Vb_YPC1 = 1 mmol_per_gDCW_per_hour;
  Ks_YPC1_Cer = 1 mmol_per_gDCW;
  Kp_YPC1_DHS_PHS = 1 mmol_per_gDCW;
  Kp_YPC1_FA = 1 mmol_per_gDCW;
  Vf_YDC1 = 1 mmol_per_gDCW_per_hour;
  Vb_YDC1 = 1 mmol_per_gDCW_per_hour;
  Ks_YDC1_Cer = 1 mmol_per_gDCW;
  Kp_YDC1_DHS_PHS = 1 mmol_per_gDCW;
  Kp_YDC1_FA = 1 mmol_per_gDCW;
  Vf_AUR1 = 1 mmol_per_gDCW_per_hour;
  Vb_AUR1 = 1 mmol_per_gDCW_per_hour;
  Ks_AUR1_Cer = 1 mmol_per_gDCW;
  Ks_AUR1_PmI = 1 mmol_per_gDCW;
  Kp_AUR1_IPC = 1 mmol_per_gDCW;
  Kp_AUR1_DAG = 1 mmol_per_gDCW;
  Ki_AUR1_DHS_PHS = 1 mmol_per_gDCW;
  Vf_SUR1 = 1 mmol_per_gDCW_per_hour;
  Vb_SUR1 = 1 mmol_per_gDCW_per_hour;
  Ks_SUR1_IPC = 1 mmol_per_gDCW;
  Kp_SUR1_MIPC = 1 mmol_per_gDCW;
  Vf_IPT1 = 1 mmol_per_gDCW_per_hour;
  Vb_IPT1 = 1 mmol_per_gDCW_per_hour;
  Ks_IPT1_MIPC = 1 mmol_per_gDCW;
  Ks_IPT1_PmI = 1 mmol_per_gDCW;
  Kp_IPT1_MIP2C = 1 mmol_per_gDCW;
  Kp_IPT1_DAG = 1 mmol_per_gDCW;
  Vf_FAA1_FAA4 = 1 mmol_per_gDCW_per_hour;
  Vb_FAA1_FAA4 = 1 mmol_per_gDCW_per_hour;
  Ks_FAA1_FAA4_FA = 1 mmol_per_gDCW;
  Kp_FAA1_FAA4_FCoA = 1 mmol_per_gDCW;
  Vf_POX1 = 1 mmol_per_gDCW_per_hour;
  Vb_POX1 = 1 mmol_per_gDCW_per_hour;
  Ks_POX1_FCoA = 1 mmol_per_gDCW;
  Kp_POX1_ACoA = 1 mmol_per_gDCW;
  Vf_MmFAR = 1 mmol_per_gDCW_per_hour;
  Vb_MmFAR = 1 mmol_per_gDCW_per_hour;
  Ks_MmFAR_FCoA = 1 mmol_per_gDCW;
  Kp_MmFAR_FOH = 1 mmol_per_gDCW;

  // Reactions:
  ACC1: ACoA -> MCoA; CKS_uu(Vf_ACC1, ACoA, Ks_ACC1_ACoA, Vb_ACC1, MCoA, Kp_ACC1_MCoA)*1/(1 + FCoA/Ki_ACC1_FCoA)*1/(1 + C26CoA/Ki_ACC1_C26CoA)*(1 + PA/Ka_ACC1_PA);  // modifiers: FCoA, C26CoA, PA
  FAS1_FAS2: ACoA + 7 MCoA -> FCoA; Lumped_1(Vf_FAS1_FAS2, ACoA, Ks_FAS1_FAS2_ACoA, MCoA, Ks_FAS1_FAS2_MCoA, Vb_FAS1_FAS2, FCoA, Kp_FAS1_FAS2_FCoA)*(1 + PA/Ka_FAS1_FAS2_PA);  // modifiers: PA
  SCT1: Glyc3P + FCoA -> LPA; CKS_bu(Vf_SCT1, Glyc3P, Ks_SCT1_Glyc3P, FCoA, Ks_SCT1_FCoA, Vb_SCT1, LPA, Kp_SCT1_LPA)*(1 + PS/Ka_SCT1_PS);  // modifiers: PS
  GPT2: Glyc3P + FCoA -> LPA; CKS_bu(Vf_GPT2, Glyc3P, Ks_GPT2_Glyc3P, FCoA, Ks_GPT2_FCoA, Vb_GPT2, LPA, Kp_GPT2_LPA)*(1 + PS/Ka_GPT2_PS);  // modifiers: PS
  SLC1: LPA + FCoA -> PA; CKS_bu(Vf_SLC1, LPA, Ks_SLC1_LPA, FCoA, Ks_SLC1_FCoA, Vb_SLC1, PA, Kp_SLC1_PA);
  ALE1_a: LPA + FCoA -> PA; CKS_bu(Vf_ALE1_a, LPA, Ks_ALE1_a_LPA, FCoA, Ks_ALE1_a_FCoA, Vb_ALE1_a, PA, Kp_ALE1_a_PA);
  ALE1_b: LPE + FCoA -> PE; CKS_bu(Vf_ALE1_b, LPE, Ks_ALE1_b_LPE, FCoA, Ks_ALE1_b_FCoA, Vb_ALE1_b, PE, Kp_ALE1_b_PE);
  ALE1_c: LPS + FCoA -> PS; CKS_bu(Vf_ALE1_c, LPS, Ks_ALE1_c_LPS, FCoA, Ks_ALE1_c_FCoA, Vb_ALE1_c, PS, Kp_ALE1_c_PS);
  ALE1_d: LPI + FCoA -> PmI; CKS_bu(Vf_ALE1_d, LPI, Ks_ALE1_d_LPI, FCoA, Ks_ALE1_d_FCoA, Vb_ALE1_d, PmI, Kp_ALE1_d_PmI);
  ALE1_e: LPC + FCoA -> PC; CKS_bu(Vf_ALE1_e, LPC, Ks_ALE1_e_LPC, FCoA, Ks_ALE1_e_FCoA, Vb_ALE1_e, PC, Kp_ALE1_e_PC);
  CDS1: PA -> CDPDAG; CKS_uu(Vf_CDS1, PA, Ks_CDS1_PA, Vb_CDS1, CDPDAG, Kp_CDS1_CDPDAG)*(1 + PA/Ka_CDS1_PA);
  INO1: Glu6P -> mIno; CKS_uu(Vf_INO1, Glu6P, Ks_INO1_Glu6P, Vb_INO1, mIno, Kp_INO1_mIno)*(1 + PA/Ka_INO1_PA);  // modifiers: PA
  INM1_PIS1: CDPDAG + mIno -> PmI; CKS_bu(Vf_INM1_PIS1, CDPDAG, Ks_INM1_PIS1_CDPDAG, mIno, Ks_INM1_PIS1_mIno, Vb_INM1_PIS1, PmI, Kp_INM1_PIS1_PmI)*(1 + PA/Ka_INM1_PIS1_PA);  // modifiers: PA
  PIK1: PmI -> PmI4P; CKS_uu(Vf_PIK1, PmI, Ks_PIK1_PmI, Vb_PIK1, PmI4P, Kp_PIK1_PmI4P);
  PGS1_GEP4: CDPDAG + Glyc3P -> PG; CKS_bu(Vf_PGS1_GEP4, CDPDAG, Ks_PGS1_GEP4_CDPDAG, Glyc3P, Ks_PGS1_GEP4_Glyc3P, Vb_PGS1_GEP4, PG, Kp_PGS1_GEP4_PG);
  CRD1: CDPDAG + PG -> CL; CKS_bu(Vf_CRD1, CDPDAG, Ks_CRD1_CDPDAG, PG, Ks_CRD1_PG, Vb_CRD1, CL, Kp_CRD1_CL);
  CHO1: CDPDAG -> PS; CKS_uu(Vf_CHO1, CDPDAG, Ks_CHO1_CDPDAG, Vb_CHO1, PS, Kp_CHO1_PS)*1/(1 + DHS_PHS/Ki_CHO1_DHS_PHS)*1/(1 + DAG/Ki_CHO1_DAG)*1/(1 + mIno/Ki_CHO1_mIno)*(1 + PA/Ka_CHO1_PA)*(1 + PmI/Ka_CHO1_PmI);  // modifiers: DHS_PHS, DAG, mIno, PA, PmI
  PSD1: PS -> PE; CKS_uu(Vf_PSD1, PS, Ks_PSD1_PS, Vb_PSD1, PE, Kp_PSD1_PE)*(1 + PA/Ka_PSD1_PA);  // modifiers: PA
  CHO2: PE -> PME; CKS_uu(Vf_CHO2, PE, Ks_CHO2_PE, Vb_CHO2, PME, Kp_CHO2_PME)*(1 + PA/Ka_CHO2_PA);  // modifiers: PA
  OPI3: PME -> PC; CKS_uu(Vf_OPI3, PME, Ks_OPI3_PME, Vb_OPI3, PC, Kp_OPI3_PC)*(1 + PA/Ka_OPI3_PA);  // modifiers: PA
  NTE1_GDE1: PC -> CDPChol + Glyc3P + 2 FA; CKS_pc(Vf_NTE1_GDE1, PC, Ks_NTE1_GDE1_PC, Vb_NTE1_GDE1, CDPChol, Kp_NTE1_GDE1_CDPChol, Glyc3P, Kp_NTE1_GDE1_Glyc3P, FA, Kp_NTE1_GDE1_FA);
  CPT1: DAG + CDPChol -> PC; CKS_bu(Vf_CPT1, DAG, Ks_CPT1_DAG, CDPChol, Ks_CPT1_CDPChol, Vb_CPT1, PC, Kp_CPT1_PC);
  SPO14: PC -> PA + CDPChol; CKS_ub(Vf_SPO14, PC, Ks_SPO14_PC, Vb_SPO14, PA, Kp_SPO14_PA, CDPChol, Kp_SPO14_CDPChol);
  EPT1: DAG + CDPEthn -> PE; CKS_bu(Vf_EPT1, DAG, Ks_EPT1_DAG, CDPEthn, Ks_EPT1_CDPEthn, Vb_EPT1, PE, Kp_EPT1_PE);
  PLB3_a: PE -> LPE + FA; CKS_ub(Vf_PLB3_a, PE, Ks_PLB3_a_PE, Vb_PLB3_a, LPE, Kp_PLB3_a_LPE, FA, Kp_PLB3_a_FA);
  PLB3_b: PS -> LPS + FA; CKS_ub(Vf_PLB3_b, PS, Ks_PLB3_b_PS, Vb_PLB3_b, LPS, Kp_PLB3_b_LPS, FA, Kp_PLB3_b_FA);
  PLB3_c: PmI -> LPI + FA; CKS_ub(Vf_PLB3_c, PmI, Ks_PLB3_c_PmI, Vb_PLB3_c, LPI, Kp_PLB3_c_LPI, FA, Kp_PLB3_c_FA);
  PLB3_d: PC -> LPC + FA; CKS_ub(Vf_PLB3_d, PC, Ks_PLB3_d_PC, Vb_PLB3_d, LPC, Kp_PLB3_d_LPC, FA, Kp_PLB3_d_FA);
  PAH1: PA -> DAG; CKS_uu(Vf_PAH1, PA, Ks_PAH1_PA, Vb_PAH1, DAG, Kp_PAH1_DAG)*1/(1 + DHS_PHS/Ki_PAH1_DHS_PHS)*(1 + CDPDAG/Ka_PAH1_CDPDAG)*(1 + PmI/Ka_PAH1_PmI);  // modifiers: DHS_PHS, CDPDAG, PmI
  DGA1: DAG + FCoA -> TAG; CKS_bu(Vf_DGA1, DAG, Ks_DGA1_DAG, FCoA, Ks_DGA1_FCoA, Vb_DGA1, TAG, Kp_DGA1_TAG);
  LRO1_a: DAG + PC -> TAG + LPC; CKS_bb(Vf_LRO1_a, DAG, Ks_LRO1_a_DAG, PC, Ks_LRO1_a_PC, Vb_LRO1_a, TAG, Kp_LRO1_a_TAG, LPC, Kp_LRO1_a_LPC);
  LRO1_b: DAG + PE -> TAG + LPE; CKS_bb(Vf_LRO1_b, DAG, Ks_LRO1_b_DAG, PE, Ks_LRO1_b_PE, Vb_LRO1_b, TAG, Kp_LRO1_b_TAG, LPE, Kp_LRO1_b_LPE);
  TGL3_a: TAG -> DAG + FA; CKS_ub(Vf_TGL3_a, TAG, Ks_TGL3_a_TAG, Vb_TGL3_a, DAG, Kp_TGL3_a_DAG, FA, Kp_TGL3_a_FA);
  TGL3_b: DAG -> Glyc3P + 2 FA; CKS_ub(Vf_TGL3_b, DAG, Ks_TGL3_b_DAG, Vb_TGL3_b, Glyc3P, Kp_TGL3_b_Glyc3P, FA, Kp_TGL3_b_FA);
  ERG_all: 18 ACoA -> Ergst; Lumped_2(Vf_ERG_all, ACoA, Ks_ERG_all_ACoA, Vb_ERG_all, Ergst, Kp_ERG_all_Ergst)*1/(1 + Ergst/Ki_ERG_all_Ergst);
  ARE2: Ergst + FCoA -> EE; CKS_bu(Vf_ARE2, Ergst, Ks_ARE2_Ergst, FCoA, Ks_ARE2_FCoA, Vb_ARE2, EE, Kp_ARE2_EE);
  TGL1: EE -> Ergst + FA; CKS_ub(Vf_TGL1, EE, Ks_TGL1_EE, Vb_TGL1, Ergst, Kp_TGL1_Ergst, FA, Kp_TGL1_FA);
  ELO123: FCoA + 5 MCoA -> C26CoA; Lumped_3(Vf_ELO123, FCoA, Ks_ELO123_FCoA, MCoA, Ks_ELO123_MCoA, Vb_ELO123, C26CoA, Kp_ELO123_C26CoA);
  LCB1: FCoA -> DHS_PHS; CKS_uu(Vf_LCB1, FCoA, Ks_LCB1_FCoA, Vb_LCB1, DHS_PHS, Kp_LCB1_DHS_PHS);
  DPL1: DHS_PHS -> CDPEthn + FA; CKS_ub(Vf_DPL1, DHS_PHS, Ks_DPL1_DHS_PHS, Vb_DPL1, CDPEthn, Kp_DPL1_CDPEthn, FA, Kp_DPL1_FA);
  LAC1: DHS_PHS + C26CoA -> Cer; CKS_bu(Vf_LAC1, DHS_PHS, Ks_LAC1_DHS_PHS, C26CoA, Ks_LAC1_C26CoA, Vb_LAC1, Cer, Kp_LAC1_Cer);
  YPC1: Cer -> DHS_PHS + FA; CKS_ub(Vf_YPC1, Cer, Ks_YPC1_Cer, Vb_YPC1, DHS_PHS, Kp_YPC1_DHS_PHS, FA, Kp_YPC1_FA);
  YDC1: Cer -> DHS_PHS + FA; CKS_ub(Vf_YDC1, Cer, Ks_YDC1_Cer, Vb_YDC1, DHS_PHS, Kp_YDC1_DHS_PHS, FA, Kp_YDC1_FA);
  AUR1: Cer + PmI -> IPC + DAG; CKS_bb(Vf_AUR1, Cer, Ks_AUR1_Cer, PmI, Ks_AUR1_PmI, Vb_AUR1, IPC, Kp_AUR1_IPC, DAG, Kp_AUR1_DAG)*1/(1 + DHS_PHS/Ki_AUR1_DHS_PHS);  // modifiers: DHS_PHS
  SUR1: IPC -> MIPC; CKS_uu(Vf_SUR1, IPC, Ks_SUR1_IPC, Vb_SUR1, MIPC, Kp_SUR1_MIPC);
  IPT1: MIPC + PmI -> MIP2C + DAG; CKS_bb(Vf_IPT1, MIPC, Ks_IPT1_MIPC, PmI, Ks_IPT1_PmI, Vb_IPT1, MIP2C, Kp_IPT1_MIP2C, DAG, Kp_IPT1_DAG);
  FAA1_FAA4: FA -> FCoA; CKS_uu(Vf_FAA1_FAA4, FA, Ks_FAA1_FAA4_FA, Vb_FAA1_FAA4, FCoA, Kp_FAA1_FAA4_FCoA);
  POX1: FCoA -> 8 ACoA; Lumped_4(Vf_POX1, FCoA, Ks_POX1_FCoA, Vb_POX1, ACoA, Kp_POX1_ACoA);
  MmFAR: FCoA -> FOH; CKS_uu(Vf_MmFAR, FCoA, Ks_MmFAR_FCoA, Vb_MmFAR, FOH, Kp_MmFAR_FOH);

  // Unit definitions:
  unit mmol_per_gDCW_per_hour = 1e-3 mole / (3600 second * gram);
  unit mmol_per_gDCW = 1e-3 mole / gram;
end
